! MAE 155B Flying-Wing  |  X fwd Y right Z up  |  meters
! AInc = geometric_twist - alphaL0  (root 1.3142 deg, tip 0.6195 deg)
Flying-Wing Dynamic Stability
0.0764     ! Mach
0  0  0.0
  0.300030     0.188288     1.596952     ! Sref Cref Bref
  0.347071     0.003289     -0.002898    ! Xref Yref Zref (CG)
0.0

! WING  NACA0012  elevons eta=0.60-0.90
SURFACE
Wing
12 1.0  20 1.0
YDUPLICATE
0.0

SECTION
  0.082200     0.145000     0.000000   0.203110     1.314250
NACA
0012

! elevon starts
SECTION
  0.367255     0.624085     0.000000   0.184830     0.897380
NACA
0012
CONTROL
elevator     1.000  0.750     0 0 0         1.0
CONTROL
aileron      1.000  0.750     0 0 0        -1.0

! elevon ends
SECTION
  0.509782     0.863628     0.000000   0.175690     0.688945
NACA
0012
CONTROL
elevator     1.000  0.750     0 0 0         1.0
CONTROL
aileron      1.000  0.750     0 0 0        -1.0

SECTION
  0.557291     0.943476     0.000000   0.172643     0.619466
NACA
0012

! VFIN_R  NACA0010  bottom-tip→root→top-tip  rudder eta=0.15-0.95
SURFACE
Vfin_R
8 1.0  16 1.0

SECTION
  0.630279     0.943476     -0.095888    0.105759     0.000000
NACA
0010

! root
SECTION
  0.557291     0.943476     0.000000     0.176265     0.000000
NACA
0010

! rudder starts
SECTION
  0.576055     0.943476     0.027920     0.165689     0.000000
NACA
0010

! rudder ends
SECTION
  0.676128     0.943476     0.176829     0.109284     0.000000
NACA
0010
CONTROL
rudder    1.000  0.700     0 0 0          1.0

SECTION
  0.682383     0.943476     0.186136     0.105759     0.000000
NACA
0010
CONTROL
rudder    1.000  0.700     0 0 0          1.0

! VFIN_L  mirror of Vfin_R  rudder gain=-1
SURFACE
Vfin_L
8 1.0  16 1.0

SECTION
  0.630279     -0.943476    -0.095888    0.105759     0.000000
NACA
0010

SECTION
  0.557291     -0.943476    0.000000     0.176265     0.000000
NACA
0010

SECTION
  0.576055     -0.943476    0.027920     0.165689     0.000000
NACA
0010

SECTION
  0.676128     -0.943476    0.176829     0.109284     0.000000
NACA
0010
CONTROL
rudder   -1.000  0.700     0 0 0          1.0

SECTION
  0.682383     -0.943476    0.186136     0.105759     0.000000
NACA
0010
CONTROL
rudder   -1.000  0.700     0 0 0          1.0
